// SBML level 2 version 4

model New_Model()

  // Compartments:
  compartment cell = 1e-12;

  // Species:
  species prom_gfp in cell = 8.302695e-9;
  species mRNA_GFP in cell = 8.685015e-10;
  species GFP in cell = 6.316375e-8;
  species prom_gfp_0 in cell = 0; prom_gfp_0 is "prom_gfp_active";
  species inducer_1 in cell = 0;

  // Reactions:
  GFP_inactive_transcription: prom_gfp => prom_gfp + mRNA_GFP; cell*GFP_inactive_transcription_k1*prom_gfp;
    GFP_inactive_transcription_k1 = 0.0006974;
  GFP_translation: mRNA_GFP => mRNA_GFP + GFP; cell*GFP_translation_k1*mRNA_GFP;
    GFP_translation_k1 = 0.084;
  GFP_mRNA_degradation: mRNA_GFP => ; cell*GFP_mRNA_degradation_k1*mRNA_GFP;
    GFP_mRNA_degradation_k1 = 0.006667;
  GFP_protein_degradation: GFP => ; cell*GFP_protein_degradation_k1*GFP;
    GFP_protein_degradation_k1 = 0.001155;
  GFP_active_transcription: prom_gfp_0 => prom_gfp_0 + mRNA_GFP; cell*GFP_active_transcription_k1*prom_gfp_0;
    GFP_active_transcription_k1 = 0.06974;
  gfp_promoter_activation__forward: prom_gfp + inducer_1 -> prom_gfp_0; cell*(gfp_promoter_activation__forward_k1*prom_gfp*inducer_1 - k2*prom_gfp_0);
    gfp_promoter_activation__forward_k1 = 10000; k2 = 1;

  // Unit definitions:
  unit volume = 1e-3 litre;
  unit substance = 1e-3 mole;
end
