// SBML level 2 version 4

model New_Model()

  // Compartments:
  compartment cell = 1e-12;

  // Species:
  species prom_gfp in cell = 8.091956e-9;
  species mRNA_GFP in cell = 3.045112e-9;
  species GFP in cell = 2.215418e-7;
  species prom_gfp_active in cell = 2.107395e-10;
  species inducer_1 in cell = 0;
  species prom_tf_a in cell = 8.302695e-9;
  species prom_tf_a_active in cell = 0;
  species TF_A in cell = 1.736206e-8;
  species mRNA_TF_A in cell = 4.561688e-10;

  // Reactions:
  GFP_inactive_transcription: prom_gfp => prom_gfp + mRNA_GFP; cell*GFP_inactive_transcription_k1*prom_gfp;
    GFP_inactive_transcription_k1 = 0.0006964;
  GFP_translation: mRNA_GFP => mRNA_GFP + GFP; cell*GFP_translation_k1*mRNA_GFP;
    GFP_translation_k1 = 0.08403;
  GFP_mRNA_degradation: mRNA_GFP => ; cell*GFP_mRNA_degradation_k1*mRNA_GFP;
    GFP_mRNA_degradation_k1 = 0.006677;
  GFP_protein_degradation: GFP => ; cell*GFP_protein_degradation_k1*GFP;
    GFP_protein_degradation_k1 = 0.001155;
  GFP_active_transcription: prom_gfp_active => prom_gfp_active + mRNA_GFP; cell*GFP_active_transcription_k1*prom_gfp_active;
    GFP_active_transcription_k1 = 0.06974;
  gfp_promoter_activation: prom_gfp + TF_A -> prom_gfp_active; cell*(gfp_promoter_activation_k1*prom_gfp*TF_A - gfp_promoter_activation_k2*prom_gfp_active);
    gfp_promoter_activation_k1 = 1500000; gfp_promoter_activation_k2 = 1;
  TF_A_mRNA_degradation: mRNA_TF_A => ; cell*TF_A_mRNA_degradation_k1*mRNA_TF_A;
    TF_A_mRNA_degradation_k1 = 0.006667;
  TF_A_protein_degradation: TF_A => ; cell*TF_A_protein_degradation_k1*TF_A;
    TF_A_protein_degradation_k1 = 0.001155;
  TF_A_translation: mRNA_TF_A => mRNA_TF_A + TF_A; cell*TF_A_translation_k1*mRNA_TF_A;
    TF_A_translation_k1 = 0.04396;
  TF_A_promoter_activation: inducer_1 + prom_tf_a -> prom_tf_a_active; cell*(TF_A_promoter_activation_k1*inducer_1*prom_tf_a - TF_A_promoter_activation_k2*prom_tf_a_active);
    TF_A_promoter_activation_k1 = 10000; TF_A_promoter_activation_k2 = 1;
  TF_A_inactive_transcription: prom_tf_a => prom_tf_a + mRNA_TF_A; cell*TF_A_inactive_transcription_k1*prom_tf_a;
    TF_A_inactive_transcription_k1 = 0.0003663;
  TF_A_active_transcription: prom_tf_a_active => prom_tf_a_active + mRNA_TF_A; cell*TF_A_active_transcription_k1*prom_tf_a_active;
    TF_A_active_transcription_k1 = 0.03663;

  // Unit definitions:
  unit volume = 1e-3 litre;
  unit substance = 1e-3 mole;
end
