// SBML level 2 version 4

model New_Model()

  // Compartments:
  compartment cell = 1e-12;

  // Species:
  species inducer_1 in cell = 0;
  species prom_GFP in cell = 8.302695e-9;
  species prom_GFP_repressed in cell = 0;
  species mRNA_GFP in cell = 8.685015e-8;
  species GFP in cell = 6.318631e-6;

  // Reactions:
  GFP_inactive_transcription: prom_GFP_repressed => prom_GFP_repressed + mRNA_GFP; cell*GFP_inactive_transcription_k1*prom_GFP_repressed;
    GFP_inactive_transcription_k1 = 0.0006974;
  GFP_active_transcription: prom_GFP => prom_GFP + mRNA_GFP; cell*GFP_active_transcription_k1*prom_GFP;
    GFP_active_transcription_k1 = 0.06974;
  GFP_translation: mRNA_GFP => mRNA_GFP + GFP; cell*GFP_translation_k1*mRNA_GFP;
    GFP_translation_k1 = 0.08403;
  GFP_mRNA_degradation: mRNA_GFP => ; cell*GFP_mRNA_degradation_k1*mRNA_GFP;
    GFP_mRNA_degradation_k1 = 0.006667;
  GFP_protein_degradation: GFP => ; cell*GFP_protein_degradation_k1*GFP;
    GFP_protein_degradation_k1 = 0.001155;
  GFP_promoter_repression: prom_GFP + inducer_1 -> prom_GFP_repressed; cell*(GFP_promoter_repression_k1*prom_GFP*inducer_1 - k2*prom_GFP_repressed);
    GFP_promoter_repression_k1 = 10000; k2 = 1;

  // Unit definitions:
  unit volume = 1e-3 litre;
  unit substance = 1e-3 mole;
end
