// SBML level 2 version 4

model New_Model()

  // Compartments:
  compartment cell = 1e-12;

  // Species:
  species inducer_1 in cell = 0;
  species prom_TF_A in cell = 8.302695e-9;
  species mRNA_TF_A in cell = 4.561688e-8;
  species TF_A in cell = 1.736206e-6;
  species prom_TF_A_repressed in cell = 0;
  species prom_GFP in cell = 2.618934e-9;
  species prom_GFP_active in cell = 5.683761e-9;
  species mRNA_GFP in cell = 5.972881e-8;
  species GFP in cell = 4.345464e-6;

  // Reactions:
  TF_A_promoter_repression: inducer_1 + prom_TF_A -> prom_TF_A_repressed; cell*(TF_A_promoter_repression_k1*inducer_1*prom_TF_A - TF_A_promoter_repression_k2*prom_TF_A_repressed);
    TF_A_promoter_repression_k1 = 10000; TF_A_promoter_repression_k2 = 1;
  TF_A_inactive_transcription: prom_TF_A_repressed => prom_TF_A + mRNA_TF_A; cell*TF_A_inactive_transcription_k1*prom_TF_A_repressed;
    TF_A_inactive_transcription_k1 = 0.0003663;
  TF_A_active_transcription: prom_TF_A => prom_TF_A + mRNA_TF_A; cell*TF_A_active_transcription_k1*prom_TF_A;
    TF_A_active_transcription_k1 = 0.03663;
  TF_A_translation: mRNA_TF_A => mRNA_TF_A + TF_A; cell*TF_A_translation_k1*mRNA_TF_A;
    TF_A_translation_k1 = 0.04396;
  TF_A_mRNA_degradation: mRNA_TF_A => ; cell*TF_A_mRNA_degradation_k1*mRNA_TF_A;
    TF_A_mRNA_degradation_k1 = 0.006667;
  TF_A_protein_degradation: TF_A => ; cell*TF_A_protein_degradation_k1*TF_A;
    TF_A_protein_degradation_k1 = 0.001155;
  GFP_promoter_activation: prom_GFP + TF_A -> prom_GFP_active; cell*(GFP_promoter_activation_k1*prom_GFP*TF_A - GFP_promoter_activation_k2*prom_GFP_active);
    GFP_promoter_activation_k1 = 1250000; GFP_promoter_activation_k2 = 1;
  GFP_inactive_transcription: prom_GFP => prom_GFP + mRNA_GFP; cell*GFP_inactive_transcription_k1*prom_GFP;
    GFP_inactive_transcription_k1 = 0.0006974;
  GFP_active_transcription: prom_GFP_active => prom_GFP_active + mRNA_GFP; cell*GFP_active_transcription_k1*prom_GFP_active;
    GFP_active_transcription_k1 = 0.06974;
  GFP_translation: mRNA_GFP => mRNA_GFP + GFP; cell*GFP_translation_k1*mRNA_GFP;
    GFP_translation_k1 = 0.08403;
  GFP_mRNA_degradation: mRNA_GFP => ; cell*GFP_mRNA_degradation_k1*mRNA_GFP;
    GFP_mRNA_degradation_k1 = 0.006667;
  GFP_protein_degradation: GFP => ; cell*GFP_protein_degradation_k1*GFP;
    GFP_protein_degradation_k1 = 0.001155;

  // Unit definitions:
  unit volume = 1e-3 litre;
  unit substance = 1e-3 mole;
end
