// SBML level 2 version 4

model New_Model()

  // Compartments:
  compartment cell = 1e-12;

  // Species:
  species inducer_1 in cell = 0;
  species prom_TF_R in cell = 8.302695e-9;
  species prom_TF_R_repressed in cell = 0;
  species mRNA_TF_R in cell = 4.561688e-8;
  species TF_R in cell = 1.736206e-6;
  species prom_GFP in cell = 8.161003e-9;
  species prom_GFP_repressed in cell = 1.416918e-10;
  species mRNA_GFP in cell = 8.538281e-8;
  species GFP in cell = 6.211877e-6;

  // Reactions:
  TF_R_promoter_repression: prom_TF_R + inducer_1 -> prom_TF_R_repressed; cell*(TF_R_promoter_repression_k1*prom_TF_R*inducer_1 - TF_R_promoter_repression_k2*prom_TF_R_repressed);
    TF_R_promoter_repression_k1 = 10000; TF_R_promoter_repression_k2 = 1;
  TF_R_inactive_transcription: prom_TF_R_repressed => prom_TF_R_repressed + mRNA_TF_R; cell*TF_R_inactive_transcription_k1*prom_TF_R_repressed;
    TF_R_inactive_transcription_k1 = 0.0003663;
  TF_R_active_transcription: prom_TF_R => prom_TF_R + mRNA_TF_R; cell*TF_R_active_transcription_k1*prom_TF_R;
    TF_R_active_transcription_k1 = 0.03663;
  TF_R_translation: mRNA_TF_R => mRNA_TF_R + TF_R; cell*TF_R_translation_k1*mRNA_TF_R;
    TF_R_translation_k1 = 0.04396;
  TF_R_mRNA_degradation: mRNA_TF_R => ; cell*TF_R_mRNA_degradation_k1*mRNA_TF_R;
    TF_R_mRNA_degradation_k1 = 0.006667;
  TF_R_protein_degradation: TF_R => ; cell*TF_R_protein_degradation_k1*TF_R;
    TF_R_protein_degradation_k1 = 0.001155;
  GFP_promoter_repression: prom_GFP + TF_R -> prom_GFP_repressed; cell*(GFP_promoter_repression_k1*prom_GFP*TF_R - GFP_promoter_repression_k2*prom_GFP_repressed);
    GFP_promoter_repression_k1 = 10000; GFP_promoter_repression_k2 = 1;
  GFP_inactive_transcription: prom_GFP_repressed => prom_GFP_repressed + mRNA_GFP; cell*GFP_inactive_transcription_k1*prom_GFP_repressed;
    GFP_inactive_transcription_k1 = 0.0006974;
  GFP_active_transcription: prom_GFP => prom_GFP + mRNA_GFP; cell*GFP_active_transcription_k1*prom_GFP;
    GFP_active_transcription_k1 = 0.06974;
  GFP_translation: mRNA_GFP => mRNA_GFP + GFP; cell*GFP_translation_k1*mRNA_GFP;
    GFP_translation_k1 = 0.08403;
  GFP_mRNA_degradation: mRNA_GFP => ; cell*GFP_mRNA_degradation_k1*mRNA_GFP;
    GFP_mRNA_degradation_k1 = 0.006667;
  GFP_protein_degradation: GFP => ; cell*GFP_protein_degradation_k1*GFP;
    GFP_protein_degradation_k1 = 0.001155;

  // Unit definitions:
  unit volume = 1e-3 litre;
  unit substance = 1e-3 mole;
end
